# OpenSim document version 30000
Model double_pendulum:
  credits: Chris Dembia
  length_units: meters
  force_units: N
  gravity: 0 -9.80665 0
  BodySet:
    Body ground: mass=0 mass_center=(0 0 0) inertia_xx=1 inertia_yy=1 inertia_zz=1 meshes=(sphere.vtp box.vtp)
    Body link1: mass=1 mass_center=(0 -1 0) inertia_xx=0 inertia_yy=0 inertia_zz=0 meshes=(cylinder.vtp sphere.vtp)
      PinJoint ground_link1: parent_body=ground location_in_parent=(0 0 0) location=(0 0 0)
        Coordinate q1: motion_type=rotational default_value=0.54 range=(-3.14 3.14)
    Body link2: mass=2 mass_center=(0 -1 0) inertia_xx=0 inertia_yy=0 inertia_zz=0 meshes=(cylinder.vtp sphere.vtp)
      PinJoint link1_link2: parent_body=link1 location_in_parent=(0 -1 0) location=(0 0 0)
        Coordinate q2: motion_type=rotational default_value=0.91 range=(-3.14 3.14)
  MarkerSet:
    Marker end_effector: link2 (0 -1.15 0)
